*STEP, NAME=Eigengewicht, INC=100000, AMPLITUDE=RAMP, NLGEOM=YES, UNSYMM=YES
*STATIC
             0.1,               1.,            1.E-5,              0.5
*STEP, NAME=MODAL_ANALYSIS
*FREQUENCY, EIGENSOLVER=LANCZOS, SIM
      ,   1,  100
